*Heading
** Job name: Job-1 Model name: Model-1
** Generated by: Abaqus/CAE 2023
*Preprint, echo=NO, model=NO, history=NO, contact=NO
**
** PARTS
**
*Part, name=Part-1
*Node
      1,          50.,          50.,         100.
      2,          50.,         47.5,         100.
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*Element, type=C3D8R
    1,   862,   863,   884,   883,     1,     2,    23,    22
    2,   863,   864,   885,   884,     2,     3,    24,    23
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*Nset, nset=Set-1, generate
     1,  18081,      1
*Elset, elset=Set-1, generate
     1,  16000,      1
** Section: Section-1
*Solid Section, elset=Set-1, material=Material-1
,
*End Part
**
**
** ASSEMBLY
**
*Assembly, name=Assembly
**
*Instance, name=Part-1-1, part=Part-1
*End Instance
**
*Node
      1,          25.,         100.,         100.
*Nset, nset=Coupled_Point
 1,
*Nset, nset=fixed_face, instance=Part-1-1
   841,   842,   843,   844,   845,   846
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*Elset, elset=fixed_face, instance=Part-1-1
   781,   782,   783,   784,   785,   786
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*Nset, nset=load_edge, instance=Part-1-1, generate
     1,  17221,    861
*Elset, elset=load_edge, instance=Part-1-1, generate
     1,  15201,    800
*Surface, type=NODE, name=load_edge_CNS_, internal
load_edge, 1.
** Constraint: Constraint-1
*Coupling, constraint name=Constraint-1, ref node=Coupled_Point, surface=load_edge_CNS_
*Kinematic
*End Assembly
**
** MATERIALS
**
*Material, name=Material-1
*Elastic
40., 0.48
**
** BOUNDARY CONDITIONS
**
** Name: BC-1 Type: Symmetry/Antisymmetry/Encastre
*Boundary
fixed_face, ENCASTRE
** ----------------------------------------------------------------
**
** STEP: Step-1
**
*Step, name=Step-1, nlgeom=NO
*Static
1., 1., 1e-05, 1.
**
** LOADS
**
** Name: Load-1   Type: Concentrated force
*Cload
Coupled_Point, 2, -100.
**
** OUTPUT REQUESTS
**
*Restart, write, frequency=0
**
** FIELD OUTPUT: F-Output-1
**
*Output, field, variable=PRESELECT
**
** HISTORY OUTPUT: H-Output-1
**
*Output, history, variable=PRESELECT
*End Step
